*Heading
** Job name: Job-1 Model name: Model-1
** Generated by: Abaqus/CAE 2016
*Preprint, echo=NO, model=NO, history=NO, contact=NO
**
** PARTS
**
*Part, name=Part-1
*Node
      1,           3.,           3.,          1.5
      2,           3.,          2.5,          1.5
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*Element, type=C3D8R
  1,  53,  54,  67,  66,   1,   2,  15,  14
  2,  54,  55,  68,  67,   2,   3,  16,  15
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*Nset, nset=Set-1, generate
   1,  676,    1
*Elset, elset=Set-1, generate
   1,  432,    1
*Nset, nset=Z-
  40,  41,  42,  43,  44,  45
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*Nset, nset=Y-, generate
  13,  676,   13
*Nset, nset=X+, generate
  1,  52,   1
*Nset, nset=Y+, generate
   1,  664,   13
*Nset, nset=X-, generate
 625,  676,    1
** Section: Section-1
*Solid Section, elset=Set-1, material=Material-1
,
*End Part
**
**
** ASSEMBLY
**
*Assembly, name=Assembly
**
*Instance, name=Part-1-1, part=Part-1
*End Instance
**
*Spring, elset=Z--spring
3
10000.
*Dashpot, elset=Z--dashpot
3
20000.
*Element, type=Spring1, elset=Z--spring
1, Part-1-1.40
3, Part-1-1.41
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*Element, type=Dashpot1, elset=Z--dashpot
2, Part-1-1.40
4, Part-1-1.41
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*End Assembly
**
** MATERIALS
**
*Material, name=Material-1
*Density
2150.,
*Elastic
 2.15e+07, 0.35
** ----------------------------------------------------------------
**
** STEP: Step-1
**
*Step, name=Step-1, nlgeom=NO, perturbation
*Frequency, eigensolver=Lanczos, sim=NO, acoustic coupling=on, normalization=displacement
30, , , , ,
**
** OUTPUT REQUESTS
**
*Restart, write, frequency=0
**
** FIELD OUTPUT: F-Output-1
**
*Output, field, variable=PRESELECT
*End Step

*step,name=matrix
*matrix generate,stiffness,mass
*matrix output,stiffness,mass
*end step
